*Heading
** Job name: beamDeflec_quadPSE_largeD_load800_fixX Model name: Model-1
** Generated by: Abaqus/CAE 6.14-1
*Preprint, echo=NO, model=NO, history=NO, contact=NO
**
** PARTS
**
*Part, name=beam_deflection
*End Part
**
**
** ASSEMBLY
**
*Assembly, name=Assembly
**
*Instance, name=beam_deflection-1, part=beam_deflection
*Node
      1,           0.,           0.
      2,           1.,           0.
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*Element, type=CPS6
  1,   1,   2,  43, 206, 207, 208
  2,  43,  42,   1, 209, 210, 208
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*Nset, nset=Set-1, generate
   1,  729,    1
*Elset, elset=Set-1, generate
   1,  320,    1
** Section: Section-1
*Solid Section, elset=Set-1, material=Material-1
,
*End Instance
**
*Nset, nset=left_face, instance=beam_deflection-1
   1,  42,  83, 124, 165, 210, 370, 491, 612
*Elset, elset=left_face, instance=beam_deflection-1, generate
   2,  242,   80
*Nset, nset=right_face, instance=beam_deflection-1
  41,  82, 123, 164, 205, 364, 485, 606, 727
*Elset, elset=right_face, instance=beam_deflection-1, generate
  79,  319,   80
*Nset, nset=right_fix_x, instance=beam_deflection-1
  41,  82, 123, 164, 205, 364, 485, 606, 727
*Elset, elset=right_fix_x, instance=beam_deflection-1, generate
  79,  319,   80
*Elset, elset=_y_load_face_S2, internal, instance=beam_deflection-1, generate
  79,  319,   80
*Surface, type=ELEMENT, name=y_load_face
_y_load_face_S2, S2
*End Assembly
**
** MATERIALS
**
*Material, name=Material-1
*Elastic
200000., 0.3
** ----------------------------------------------------------------
**
** STEP: Step-1
**
*Step, name=Step-1, nlgeom=NO
*Static
0.25, 1., 1e-05, 0.25
**
** BOUNDARY CONDITIONS
**
** Name: left_fit Type: Displacement/Rotation
*Boundary
left_face, 1, 1
left_face, 2, 2
** Name: right_fix_x Type: Displacement/Rotation
*Boundary
right_fix_x, 1, 1
**
** LOADS
**
** Name: y_load   Type: Surface traction
*Dsload
y_load_face, TRVEC, 800., 0., 1., 0.
**
** OUTPUT REQUESTS
**
*Restart, write, frequency=0
**
** FIELD OUTPUT: F-Output-1
**
*Output, field, variable=PRESELECT
**
** HISTORY OUTPUT: H-Output-1
**
*Output, history, variable=PRESELECT
*End Step
