*Heading
** Job name: beam_CPS3_disp_meshSize1 Model name: Model-1
** Generated by: Abaqus/CAE 6.14-1
*Preprint, echo=NO, model=NO, history=NO, contact=NO
**
** PARTS
**
*Part, name=beamDeflec
*End Part
**
**
** ASSEMBLY
**
*Assembly, name=Assembly
**
*Instance, name=beamDeflec-1, part=beamDeflec
*Node
      1,           0.,           0.
      2,           1.,           0.
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*Element, type=CPS3
  1,   1,   2,  43
  2,  43,  42,   1
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*Nset, nset=Set-1, generate
   1,  205,    1
*Elset, elset=Set-1, generate
   1,  320,    1
** Section: Section-1
*Solid Section, elset=Set-1, controls=EC-1, material=Material-1
,
*End Instance
**
*Nset, nset=left_face, instance=beamDeflec-1, generate
   1,  165,   41
*Elset, elset=left_face, instance=beamDeflec-1, generate
   2,  242,   80
*Nset, nset=right_disp, instance=beamDeflec-1, generate
  41,  205,   41
*Elset, elset=right_disp, instance=beamDeflec-1, generate
  79,  319,   80
*Nset, nset=right_side, instance=beamDeflec-1, generate
  41,  205,   41
*Elset, elset=right_side, instance=beamDeflec-1, generate
  79,  319,   80
*Elset, elset=_right_face_S2, internal, instance=beamDeflec-1, generate
  79,  319,   80
*Surface, type=ELEMENT, name=right_face
_right_face_S2, S2
*End Assembly
**
** ELEMENT CONTROLS
**
*Section Controls, name=EC-1, second order accuracy=YES
1., 1., 1.
**
** MATERIALS
**
*Material, name=Material-1
*Elastic
200000., 0.3
**
** BOUNDARY CONDITIONS
**
** Name: right_fix_x Type: Displacement/Rotation
*Boundary
right_side, 1, 1
** ----------------------------------------------------------------
**
** STEP: Step-1
**
*Step, name=Step-1, nlgeom=YES
*Static
0.05, 1., 1e-05, 0.05
**
** BOUNDARY CONDITIONS
**
** Name: left_fix Type: Displacement/Rotation
*Boundary
left_face, 1, 1
left_face, 2, 2
** Name: right_disp Type: Displacement/Rotation
*Boundary
right_disp, 2, 2, 20.
**
** OUTPUT REQUESTS
**
*Restart, write, frequency=0
**
** FIELD OUTPUT: F-Output-1
**
*Output, field, variable=PRESELECT
**
** HISTORY OUTPUT: H-Output-1
**
*Output, history, variable=PRESELECT
*End Step
