*Heading
** Job name: cook_3d_linearEl_fix2sides_smallDef Model name: Model-1
** Generated by: Abaqus/CAE 6.14-1
*Preprint, echo=NO, model=NO, history=NO, contact=NO
**
** PARTS
**
*Part, name=Part-1
*End Part
**
**
** ASSEMBLY
**
*Assembly, name=Assembly
**
*Instance, name=Part-1-1, part=Part-1
*Node
      1,          48.,          44.,           5.
      2,           0.,           0.,           5.
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*Element, type=C3D4
  1, 170,  17,  24,  16
  2, 170, 171,  89, 105
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*Nset, nset=Set-1, generate
   1,  191,    1
*Elset, elset=Set-1, generate
   1,  537,    1
** Section: Section-1
*Solid Section, elset=Set-1, controls=EC-1, material=Material-1
,
*End Instance
**
*Nset, nset=back_face, instance=Part-1-1
   3,   4,   6,   7,  21,  22
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*Elset, elset=back_face, instance=Part-1-1
   3,  15,  46,  50,  65,  80
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*Nset, nset=front_face, instance=Part-1-1
   1,   2,   5,   8,   9,  10
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*Elset, elset=front_face, instance=Part-1-1
   8,  21,  34,  35,  45,  47
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*Nset, nset=left_face, instance=Part-1-1
  2,  3,  5,  6, 33, 34
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*Elset, elset=left_face, instance=Part-1-1
  44,  63, 102, 216, 230, 420
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*Elset, elset=_right_face_S3, internal, instance=Part-1-1
 303, 307, 405, 530
*Elset, elset=_right_face_S4, internal, instance=Part-1-1
 304,
*Elset, elset=_right_face_S1, internal, instance=Part-1-1
 413,
*Surface, type=ELEMENT, name=right_face
_right_face_S3, S3
_right_face_S4, S4
_right_face_S1, S1
*End Assembly
**
** ELEMENT CONTROLS
**
*Section Controls, name=EC-1, second order accuracy=YES
1., 1., 1.
**
** MATERIALS
**
*Material, name=Material-1
*Hyperelastic, neo hooke
    0.4, 0.05
**  C1,  1./D1
**
** BOUNDARY CONDITIONS
**
** Name: fix_front Type: Displacement/Rotation
*Boundary
front_face, 3, 3
** ----------------------------------------------------------------
**
** STEP: Step-1
**
*Step, name=Step-1, nlgeom=YES
*Static
1., 1., 1e-05, 1.
**
** BOUNDARY CONDITIONS
**
** Name: fix_back Type: Displacement/Rotation
*Boundary
back_face, 3, 3
** Name: fix_left Type: Displacement/Rotation
*Boundary
left_face, 1, 1
left_face, 2, 2
**
** LOADS
**
** Name: load_right   Type: Surface traction
*Dsload, follower=NO
right_face, TRVEC, 0.0625, 0., 1., 0.
**
** OUTPUT REQUESTS
**
*Restart, write, frequency=0
**
** FIELD OUTPUT: F-Output-1
**
*Output, field, variable=PRESELECT
**
** HISTORY OUTPUT: H-Output-1
**
*Output, history, variable=PRESELECT
*End Step
