*Heading
** Job name: cook_membrane_2d_pe Model name: Model-1
** Generated by: Abaqus/CAE 6.14-1
*Preprint, echo=NO, model=NO, history=NO, contact=NO
**
** PARTS
**
*Part, name=cook_membrane_2d
*End Part
**
**
** ASSEMBLY
**
*Assembly, name=Assembly
**
*Instance, name=cook_membrane_2d-1, part=cook_membrane_2d
*Node
      1,           0.,          44.
      2,           0.,           0.
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*Element, type=CPE6M
  1,  154,   77,   78,  461,  462,  463
  2,  147,   70,   71,  464,  465,  466
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*Nset, nset=Set-1, generate
    1,  1749,     1
*Elset, elset=Set-1, generate
   1,  830,    1
** Section: Section-1
*Solid Section, elset=Set-1, controls=EC-1, material=Material-1
,
*End Instance
**
*Nset, nset=left_face, instance=cook_membrane_2d-1
   1,   2,   5,   6,   7,   8
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*Elset, elset=left_face, instance=cook_membrane_2d-1
  23,  86,  87,  99, 100, 101
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*Elset, elset=_right_face_S2, internal, instance=cook_membrane_2d-1
  51,  55, 184, 189, 191, 193, 198
*Elset, elset=_right_face_S1, internal, instance=cook_membrane_2d-1
 62,
*Surface, type=ELEMENT, name=right_face
_right_face_S2, S2
_right_face_S1, S1
*End Assembly
**
** ELEMENT CONTROLS
**
*Section Controls, name=EC-1, second order accuracy=YES
1., 1., 1.
**
** MATERIALS
**
*Material, name=Material-1
*Elastic
70., 0.3333
** ----------------------------------------------------------------
**
** STEP: Step-1
**
*Step, name=Step-1, nlgeom=YES
*Static
1.,         1.,     0.5e-2,       1.
** ini,  max_time, min_inc, max_inc
**
** BOUNDARY CONDITIONS
**
** Name: left_fix Type: Displacement/Rotation
*Boundary
left_face, 1, 1
left_face, 2, 2
**
** LOADS
**
** Name: load_force   Type: Surface traction
*Dsload, constant resultant=YES
right_face, TRVEC, 6.25, 0., 1., 0.
**
** OUTPUT REQUESTS
**
*Restart, write, frequency=0
**
** FIELD OUTPUT: F-Output-1
**
*Output, field, variable=PRESELECT
**
** HISTORY OUTPUT: H-Output-1
**
*Output, history, variable=PRESELECT
*End Step
