*Heading
** Job name: ellip_membrane_quadritic_trig_neumann Model name: Model-1
** Generated by: Abaqus/CAE 6.14-1
*Preprint, echo=NO, model=NO, history=NO, contact=NO
**
** PARTS
**
*Part, name=ellip_membrane
*End Part
**
**
** ASSEMBLY
**
*Assembly, name=Assembly
**
*Instance, name=ellip_membrane-1, part=ellip_membrane
*Node
      1,         3.25,           0.
      2,   3.20241785,  0.468848377
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*Element, type=CPE6M
  1,   1,   2,  13,  67,  68,  69
  2,  13,  12,   1,  70,  71,  69
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*Nset, nset=Set-1, generate
   1,  231,    1
*Elset, elset=Set-1, generate
   1,  100,    1
** Section: Section-1
*Solid Section, elset=Set-1, controls=EC-1, material=Material-1
,
*End Instance
**
*Nset, nset=Set-2, instance=ellip_membrane-1
   1,  12,  23,  34,  45,  56,  71, 111, 142, 173, 204
*Elset, elset=Set-2, instance=ellip_membrane-1, generate
  2,  82,  20
*Nset, nset=Set-18, instance=ellip_membrane-1
 1,
*Nset, nset=Set-19, instance=ellip_membrane-1
 11, 66
*Nset, nset=left-edge, instance=ellip_membrane-1
  11,  22,  33,  44,  55,  66, 105, 136, 167, 198, 229
*Elset, elset=left-edge, instance=ellip_membrane-1, generate
 19,  99,  20
*Elset, elset=_Surf-1_S1, internal, instance=ellip_membrane-1, generate
  1,  19,   2
*Surface, type=ELEMENT, name=Surf-1
_Surf-1_S1, S1
*Elset, elset=_Surf-2_S1, internal, instance=ellip_membrane-1, generate
  1,  19,   2
*Surface, type=ELEMENT, name=Surf-2
_Surf-2_S1, S1
*End Assembly
**
** ELEMENT CONTROLS
**
*Section Controls, name=EC-1, second order accuracy=YES
1., 1., 1.
**
** MATERIALS
**
*Material, name=Material-1
*Elastic
210000., 0.3
** ----------------------------------------------------------------
**
** STEP: Step-1
**
*Step, name=Step-1, nlgeom=NO
*Static
0.25, 1., 1e-05, 0.25
**
** BOUNDARY CONDITIONS
**
** Name: bottom-fit Type: Displacement/Rotation
*Boundary
Set-2, 2, 2
** Name: left-fit Type: Displacement/Rotation
*Boundary
left-edge, 1, 1
**
** LOADS
**
** Name: Load-1   Type: Pressure
*Dsload
Surf-2, P, -10.
**
** OUTPUT REQUESTS
**
*Restart, write, frequency=0
**
** FIELD OUTPUT: F-Output-1
**
*Output, field, variable=PRESELECT
**
** HISTORY OUTPUT: H-Output-1
**
*Output, history, variable=PRESELECT
*End Step
