*Heading
** Job name: ellip_membrane_3d_linearEl Model name: Model-1
** Generated by: Abaqus/CAE 6.14-1
*Preprint, echo=NO, model=NO, history=NO, contact=NO
**
** PARTS
**
*Part, name=elliptic_membrane_3d
*End Part
**
**
** ASSEMBLY
**
*Assembly, name=Assembly
**
*Instance, name=elliptic_membrane_3d-1, part=elliptic_membrane_3d
*Node
      1,         3.25,           0.,  0.100000001
      2,   2.58273458,           0.,  0.100000001
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*Element, type=C3D4
  1,  97,  27,   6,  19
  2,  97,  96,  69,  94
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*Nset, nset=Set-1, generate
   1,  106,    1
*Elset, elset=Set-1, generate
   1,  237,    1
** Section: Section-1
*Solid Section, elset=Set-1, controls=EC-1, material=Material-1
,
*End Instance
**
*Nset, nset=Set-2, instance=elliptic_membrane_3d-1
  7,  8,  9, 10, 31, 32, 33, 50, 51, 52
*Elset, elset=Set-2, instance=elliptic_membrane_3d-1
  49,  58,  60,  90, 109, 110, 125, 169
*Nset, nset=back_face, instance=elliptic_membrane_3d-1
  4,  5,  8,  9, 13, 14
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*Elset, elset=back_face, instance=elliptic_membrane_3d-1
   3,   6,   7,   9,  13,  14
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*Nset, nset=down_face, instance=elliptic_membrane_3d-1
  1,  2,  3,  4,  5, 11, 12, 13, 14, 15
*Elset, elset=down_face, instance=elliptic_membrane_3d-1
 157, 214, 215, 216, 218, 221, 223, 226
*Elset, elset=_load_face_S4, internal, instance=elliptic_membrane_3d-1
  37,  73,  84,  89,  92,  96, 168
*Elset, elset=_load_face_S1, internal, instance=elliptic_membrane_3d-1
  70,  98, 113, 153, 224
*Elset, elset=_load_face_S3, internal, instance=elliptic_membrane_3d-1
 110, 221, 237
*Elset, elset=_load_face_S2, internal, instance=elliptic_membrane_3d-1
 118, 120, 151
*Surface, type=ELEMENT, name=load_face
_load_face_S4, S4
_load_face_S1, S1
_load_face_S2, S2
_load_face_S3, S3
*End Assembly
**
** ELEMENT CONTROLS
**
*Section Controls, name=EC-1, second order accuracy=YES
1., 1., 1.
**
** MATERIALS
**
*Material, name=Material-1
*Elastic
 2.1e+5, 0.3
** ----------------------------------------------------------------
**
** STEP: Step-1
**
*Step, name=Step-1, nlgeom=NO
*Static
1., 1., 1e-05, 1.
**
** BOUNDARY CONDITIONS
**
** Name: fix_back_z Type: Displacement/Rotation
*Boundary
back_face, 3, 3
** Name: fix_x Type: Displacement/Rotation
*Boundary
Set-2, 1, 1
** Name: fix_y Type: Displacement/Rotation
*Boundary
down_face, 2, 2
**
** LOADS
**
** Name: load_pressure   Type: Pressure
*Dsload
load_face, P, -10.
**
** OUTPUT REQUESTS
**
*Restart, write, frequency=0
**
** FIELD OUTPUT: F-Output-1
**
*Output, field, variable=PRESELECT
**
** HISTORY OUTPUT: H-Output-1
**
*Output, history, variable=PRESELECT
*End Step
