*Heading
** Job name: twist_plate_C3D4 Model name: Model-1
** Generated by: Abaqus/CAE 6.14-1
*Preprint, echo=NO, model=NO, history=NO, contact=NO
**
** PARTS
**
*Part, name=Part-1
*End Part
**
**
** ASSEMBLY
**
*Assembly, name=Assembly
**
*Instance, name=Part-1-1, part=Part-1
*Node
      1,          80.,          10.,         120.
      2,          80.,           0.,         120.
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*Element, type=C3D4
   1, 235, 236,  92, 167
   2, 235, 237,  92,  93
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*Nset, nset=Set-1, generate
   1,  323,    1
*Elset, elset=Set-1, generate
    1,  1116,     1
** Section: Section-1
*Solid Section, elset=Set-1, material=Material-1
,
*End Instance
**
*Nset, nset=Set-1, instance=Part-1-1
  1,  2,  5,  8, 31, 32
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*Elset, elset=Set-1, instance=Part-1-1
  217,  224,  226,  259,  284,  371,  407,  408,  409,  626,  796,  837,  839,  849, 1010, 1075
*Nset, nset=Set-10, instance=Part-1-1
  1,  2,  5,  8, 31, 32
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*Elset, elset=Set-10, instance=Part-1-1
  217,  224,  226,  259,  284,  371,  407,  408,  409,  626,  796,  837,  839,  849, 1010, 1075
*Nset, nset=Set-11, instance=Part-1-1
  1,  2,  3,  4,  9, 10
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*Elset, elset=Set-11, instance=Part-1-1
  178,  195,  276,  283,  349,  418
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*Nset, nset=Set-12, instance=Part-1-1
 6, 7
*Elset, elset=Set-12, instance=Part-1-1
 357, 871
*Nset, nset=Set-15, instance=Part-1-1
 6, 7
*Nset, nset=Set-16, instance=Part-1-1
 4,
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*Elset, elset=fit_Z_face, instance=Part-1-1
   71,  256,  285,  444,  633,  791,  804,  819,  832,  860,  871,  939,  958,  990, 1017, 1025
*Nset, nset=fit_face, instance=Part-1-1
  1,  2,  5,  8, 31, 32
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*Elset, elset=fit_face, instance=Part-1-1
  217,  224,  226,  259,  284,  371,  407,  408,  409,  626,  796,  837,  839,  849, 1010, 1075
*Nset, nset=fit_right_z, instance=Part-1-1
  3,  4,  6,  7, 49, 50
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*Elset, elset=_Surf-1_S3, internal, instance=Part-1-1
   55,   71,  135,  214,  221,  256
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*Elset, elset=_Surf-1_S2, internal, instance=Part-1-1
  563,  715,  754,  808,  860,  939, 1040
*Elset, elset=_Surf-1_S1, internal, instance=Part-1-1
  603,  904,  958,  990, 1028
*Surface, type=ELEMENT, name=Surf-1
_Surf-1_S3, S3
_Surf-1_S2, S2
_Surf-1_S1, S1
*End Assembly
**
** MATERIALS
**
*Material, name=Material-1
*Elastic
 2e+11, 0.3
** ----------------------------------------------------------------
**
** STEP: Step-1
**
*Step, name=Step-1, nlgeom=YES
*Static
0.025, 1., 1e-05, 0.025
**
** BOUNDARY CONDITIONS
**
** Name: left_fit Type: Displacement/Rotation
*Boundary
Set-10, 1, 1
Set-10, 2, 2
Set-10, 3, 3
** Name: right_face_twist Type: Displacement/Rotation
*Boundary, user
fit_right_z, 1, 1
fit_right_z, 2, 2
fit_right_z, 3, 3
**
** OUTPUT REQUESTS
**
*Restart, write, frequency=0
**
** FIELD OUTPUT: F-Output-1
**
*Output, field, variable=PRESELECT
**
** HISTORY OUTPUT: H-Output-1
**
*Output, history, variable=PRESELECT
*End Step
